// SBML level 2 version 4

model Lotka_Voltera_model()
  // Lotka-Voltera model
  // Author: Paul F Lang (paul.lang@wolfson.ox.ac.uk)
  // Date: 2020-09-03
  // This model is the COPASI version of the equations described by Shin et al. 2019 in "Scalable nonlinear programming framework for parameter estimation in dynamic biological system models" (PLOS Computational Biology).

  // Compartments:
  compartment compartment = 1;

  // Species:
  species A in compartment = 1;
  species B in compartment = 1;

  // Parameters:
  mu_a = 0;
  mu_b = 0;
  alpha_ab = -1;
  alpha_ba = 1;
  alpha_aa = -1;
  alpha_bb = -1;

  // Reactions:
  a_reproduction: A => 2 A; compartment*mu_a*A;
  b_reproduction: B => 2 B; compartment*mu_b*B;
  interaction_ab: A + B => B + 2 A; compartment*alpha_ab*A*B;
  interaction_ba: A + B => A + 2 B; compartment*alpha_ba*A*B;
  interaction_aa: 2 A => 3 A; compartment*alpha_aa*A^2;
  interaction_bb: 2 B => 3 B; compartment*alpha_bb*B^2;

  // Unit definitions:
  unit volume = 1e-3 litre;
  unit time = 3600 second;
  unit substance = 1e-12 mole;
end
