// SBML level 2 version 4

// The enzyme is specified to be a `substrate` to allow consistency with other reaction equation formulations where the enzyme appears on both sides of the reaction equation.
// https://www.wolframalpha.com/input/?i=0.5*%281-x-2%2Bsqrt%28%28-1%2Bx%2B2%29%5E2%2B4*2*1%29%29
function Inhibited_catalysis(k_cat, substrate, enzyme_t, inhibitor_t, Kd)
  k_cat*substrate*0.5*(enzyme_t - inhibitor_t - Kd + sqrt((-enzyme_t + inhibitor_t + Kd)^2 + 4*Kd*enzyme_t));
end

model New_Model()

  // Compartments:
  compartment compartment = 1;

  // Species:
  species Cb in compartment = Cb_0;
  species pCb in compartment = 0;
  species Wee in compartment = 1;
  species pWee in compartment = 0;
  species Cdc25 in compartment = 1;
  species pCdc25 in compartment = 0;
  species Gw in compartment = 1;
  species pGw in compartment = 0;
  species Ensa in compartment = 1;
  species pEnsa in compartment = 0;
  species pEB55 in compartment = 0;
  species B55 in compartment = 0.25;
  species iWee in compartment = iWee_0;

  // Parameters:
  kPhEnsa = 0.1;
  kDpEnsa = 0.05;
  kPhGw = 1;
  kDpGw1 = 0.25;
  kDpGw2 = 10;
  kWee1 = 0.01;
  kWee2 = 0.99;
  kPhWee = 1;
  kDpWee = 10;
  kCdc25_1 = 0.1;
  kCdc25_2 = 0.9;
  kPhCdc25 = 1;
  kDpCdc25 = 10;
  kDipEB55 = 0.0068;
  kAspEB55 = 57;
  jiWee = 0.1;
  iWee_0 = 0;
  Cb_0 = 0.8;
  fB55 = 1;

  // Reactions:
  PhCb2: Cb + Wee => pCb + Wee; compartment*Inhibited_catalysis(kWee2, Cb, Wee, iWee, jiWee);  // modifiers: iWee
  PhCb1: Cb => pCb; compartment*kWee1*Cb;
  DppCb1: pCb => Cb; compartment*kCdc25_1*pCb;
  DppCb2: pCb + pCdc25 => Cb + pCdc25; compartment*kCdc25_2*pCb*pCdc25;
  PhCdc25: Cb + Cdc25 => Cb + pCdc25; compartment*kPhCdc25*Cb*Cdc25;
  DpCdc25: pCdc25 + B55 => Cdc25 + B55; compartment*kDpCdc25*pCdc25*B55;
  PhWee: Cb + Wee => Cb + pWee; compartment*kPhWee*Cb*Wee;
  DppWee: pWee + B55 => Wee + B55; compartment*kDpWee*pWee*B55;
  PhGw: Gw + Cb => pGw + Cb; compartment*kPhGw*Gw*Cb;
  DppGw1: pGw => Gw; compartment*kDpGw1*pGw;
  DppGw2: pGw + B55 => Gw + B55; compartment*kDpGw2*pGw*B55;
  PhEnsa: Ensa + pGw => pEnsa + pGw; compartment*kPhEnsa*Ensa*pGw;
  AsB55pEnsa: B55 + pEnsa => pEB55; compartment*kAspEB55*B55*pEnsa;
  DipEB55: pEB55 => pEnsa + B55; compartment*kDipEB55*pEB55;
  DppEB55: pEB55 => Ensa + B55; compartment*kDpEnsa*pEB55;

  // Unit definitions:
  unit volume = 1e-3 litre;
  unit substance = 1e-3 mole;
end
