// SBML level 2 version 4

function Constant_flux__irreversible(v)
  v;
end
Constant_flux__irreversible is "Constant flux (irreversible)";

function kDpApc___f1(k1, k2, S, M)
  k1*k2*S*M;
end
kDpApc___f1 is "kDpApc * f1";

model RP_G1S_G2M_MA_v15()
  // RP-G1S-G2M-MA_v15

  // Compartments:
  compartment compartment = 1;

  // Species:
  species $Cd in compartment = 1;
  species Ce in compartment = 0;
  species E2f in compartment = 0;
  species pE2f in compartment = 0;
  species Ca in compartment = 0;
  species Cb in compartment = 0;
  species E2fRb in compartment = 0;
  species pE2fRb in compartment = 0;
  species Rb in compartment = 1;
  species pRb in compartment = 0;
  species B55 in compartment = 0.25;
  species $tRb in compartment;
  species E2fPx in compartment = 0;
  species Px in compartment = 1;
  species Apc in compartment = 5;
  species Cdc20 in compartment = 0;
  species pApcCdc in compartment = 0;
  species pApc in compartment = 0;
  species ApcCdh in compartment = 0;
  species Cdh in compartment = 1;
  species pCdh in compartment = 0;
  species ACE in compartment = 0;
  species Emi in compartment = 0;
  species pACE in compartment = 0;
  species pApcCdh in compartment = 0;
  species pEmi in compartment = 0;
  species Fox in compartment = 0;
  species pFox in compartment = 0;
  species pFoxPcb in compartment = 0;
  species Pcb in compartment = 1;
  species $tPcb in compartment;
  species Pcdc in compartment = 1;
  species pFoxPcdc in compartment = 0;
  species Wee in compartment = 1;
  species pCb in compartment = 0;
  species pWee in compartment = 0;
  species pCdc25 in compartment = 0;
  species Cdc25 in compartment = 1;
  species Gw in compartment = 1;
  species pGw in compartment = 0;
  species Ensa in compartment = 1;
  species pEnsa in compartment = 0;
  species pEB55 in compartment = 0;
  species $tApc in compartment;
  species $t_pApc in compartment; t_pApc is "t_pApc_";
  species $tCdh in compartment;
  species $tEnsa in compartment;
  species $tB55 in compartment;
  species $tGw in compartment;
  species $tCdc25 in compartment;
  species $tWee in compartment;
  species $tPx in compartment;
  species $tPcdc in compartment;
  species $tCb in compartment;
  species $tEmi in compartment;
  species $tCdc20 in compartment;

  // Parameters:
  kPhRbD = 0.8;
  kPhRbE = 1;
  kDpRb = 0.2;
  kPhRb = 3;
  kSyCe1 = 0.002;
  kSyCe2 = 0.06;
  kDeCe = 0.02;
  kDiE2fRb = 0.05;
  kAsE2fRb = 50;
  kSyE2f1 = 0.001;
  kSyE2f2 = 0.01;
  kDeE2f1 = 0.01;
  kDeE2f2 = 0.2;
  kPhE2f = 0.2;
  kDpE2f1 = 0;
  kDpE2f2 = 10;
  kSyEmi1 = 0.005;
  kSyEmi2 = 0.05;
  kDeEmi1 = 0.05;
  kDeEmi2 = 0.05;
  kDeEmi3 = 0.5;
  kPhEmiA = 0.005;
  kPhEmiB = 0.025;
  kDpEmi = 0.0005;
  kSyCa1 = 0.001;
  kSyCa2 = 0.0075;
  kDeCa1 = 0.001;
  kDeCa2 = 0.4;
  kDeCa3 = 0.1;
  kDpCdh = 0.5;
  kPhCdhA = 2.5;
  kPhCdhE = 0.1;
  kPhCdhB = 25;
  kDiACE = 0.05;
  kAsACE = 50;
  kDiACdh = 0.05;
  kAsACdh = 50;
  kPhCeA = 1;
  kPhCeE = 0.01;
  kPhFoxE = 0.1;
  kPhFoxA = 0.1;
  kPhFoxB = 0.5;
  kDpFox = 0.005;
  kSyCb1 = 0.001;
  kSyCb2 = 0.0075;
  kDeCb1 = 0.001;
  kDeCb2 = 0.125;
  kDeCb3 = 0.125;
  kPhEnsa = 0.1;
  kDpEnsa = 0.05;
  kPhGw = 1;
  kDpGw1 = 0.25;
  kDpGw2 = 10;
  kWee1 = 0.01;
  kWee2 = 1;
  kPhWeeA = 0.1;
  kPhWeeB = 1;
  kDpWee = 10;
  kCdc25_1 = 0.1;
  kCdc25_2 = 1;
  kPhC25A = 0;
  kDpCdc25 = 10;
  kDipEB55 = 0.0068;
  kAspEB55 = 57;
  kSyCdc_1 = 0.001;
  kSyCdc_2 = 0.01;
  kDeCdc_1 = 0.004;
  kDeCdc_2 = 0.04;
  kDipACdc = 0.125;
  kAspACdc = 1;
  kPhApcA = 0.01;
  kPhApcB = 0.01;
  kDpApc = 5;
  kSyFox1 = 0.001;
  kSyFox2 = 0.0075;
  kDeFox1 = 0.001;
  kDeFox2 = 0.5;
  kAsEPx = 50;
  kDiEPx = 5;
  kAsFPcb = 50;
  kDiFPcb = 10;
  kAsFPcdc = 50;
  kDiFPcdc = 25;
  f1 = 1;
  f2 = 1;
  f3 = 1;
  f4 = 0.8;
  kPhC25B = 1;

  // Assignment rules:
  tRb := Rb + pRb + pE2fRb + E2fRb;
  tPcb := Pcb + pFoxPcb;
  tApc := ACE + Apc + ApcCdh + pACE + pApc + pApcCdc + pApcCdh;
  t_pApc := pACE + pApc + pApcCdc + pApcCdh;
  tCdh := ACE + ApcCdh + Cdh + pACE + pApcCdh + pCdh;
  tEnsa := Ensa + pEB55 + pEnsa;
  tB55 := B55 + pEB55;
  tGw := Gw + pGw;
  tCdc25 := Cdc25 + pCdc25;
  tWee := pWee + Wee;
  tPx := E2fPx + Px;
  tPcdc := Pcdc + pFoxPcdc;
  tCb := Cb + pCb;
  tEmi := ACE + Emi + pACE + pEmi;
  tCdc20 := Cdc20 + pApcCdc;

  // Reactions:
  SyE2f1: => E2f; compartment*Constant_flux__irreversible(kSyE2f1);
  AspFoxPcb: pFox + Pcb => pFox + pFoxPcb; compartment*kAsFPcb*pFox*Pcb;
  SyE2f2: E2fPx => E2fPx + E2f; compartment*kSyE2f2*E2fPx;
  DeE2f: E2f => ; compartment*kDeE2f1*E2f;
  DiE2fPx: E2fPx => Px; compartment*kDiEPx*E2fPx;
  AsE2fRb: E2f + Rb -> E2fRb; compartment*(kAsE2fRb*E2f*Rb - kDiE2fRb*E2fRb);
  PhRbE2fByCd: E2fRb + $Cd => E2f + pRb + $Cd; compartment*kPhRbD*E2fRb*Cd;
  PhRbE2fByCe: E2fRb + Ce => E2f + pRb + Ce; compartment*kPhRbE*E2fRb*Ce;
  PhRbE2fByCa: E2fRb + Ca => E2f + pRb + Ca; compartment*kPhRb*E2fRb*Ca;
  PhRbE2fByCb: E2fRb + Cb => E2f + pRb + Cb; compartment*kPhRb*E2fRb*Cb;
  PhE2fByCa: E2f + Ca => pE2f + Ca; compartment*kPhE2f*E2f*Ca;
  PhE2fByCb: E2f + Cb => pE2f + Cb; compartment*kPhE2f*E2f*Cb;
  DppE2f1: pE2f => E2f; compartment*kDpE2f1*pE2f;
  DppE2fRb2: pE2fRb + B55 => E2fRb + B55; compartment*kDpE2f2*pE2fRb*B55;
  DepE2f1: pE2f => ; compartment*kDeE2f1*pE2f;
  DepE2f2: pE2f => ; compartment*kDeE2f2*pE2f;
  AspE2fRb: pE2f + Rb -> pE2fRb; compartment*(kAsE2fRb*pE2f*Rb - kDiE2fRb*pE2fRb);
  PhRbpE2fByCd: pE2fRb + $Cd => pE2f + pRb + $Cd; compartment*kPhRbD*pE2fRb*Cd;
  PhRbpE2fByCa: pE2fRb + Ca => pE2f + pRb + Ca; compartment*kPhRb*pE2fRb*Ca;
  PhRbpE2fByCb: pE2fRb + Cb => pE2f + pRb + Cb; compartment*kPhRb*pE2fRb*Cb;
  PhRbpE2fByCe: pE2fRb + Ce => pE2f + pRb + Ce; compartment*kPhRbE*pE2fRb*Ce;
  PhE2fRbByCa: E2fRb + Ca => pE2fRb + Ca; compartment*kPhE2f*E2fRb*Ca;
  PhE2fRbByCb: E2fRb + Cb => pE2fRb + Cb; compartment*kPhE2f*E2fRb*Cb;
  DppE2fRb1: pE2fRb => E2fRb; compartment*kDpE2f1*pE2fRb;
  DeE2fRb: E2fRb => Rb; compartment*kDeE2f1*E2fRb;
  DepE2fRb1: pE2fRb => Rb; compartment*kDeE2f1*pE2fRb;
  DepE2fRb2: pE2fRb => Rb; compartment*kDeE2f2*pE2fRb;
  PhRbByCd: Rb + $Cd => pRb + $Cd; compartment*kPhRbD*Rb*Cd;
  PhRbByCe: Rb + Ce => pRb + Ce; compartment*kPhRbE*Rb*Ce;
  PhRbByCa: Rb + Ca => pRb + Ca; compartment*kPhRb*Rb*Ca;
  PhRbByCb: Rb + Cb => pRb + Cb; compartment*kPhRb*Rb*Cb;
  SyCe1: => Ce; compartment*Constant_flux__irreversible(kSyCe1);
  SyCa2: E2fPx => E2fPx + Ca; compartment*kSyCa2*E2fPx;
  DeCe1: Ce => ; compartment*kDeCe*Ce;
  DeCe2: 2 Ce => Ce; compartment*kPhCeE*Ce^2;
  DpRb: pRb => Rb; compartment*kDpRb*pRb;
  DppApcCdc20: pApcCdc => Cdc20 + Apc; compartment*kDpApc___f1(kDpApc, f1, pApcCdc, B55);  // modifiers: B55
  PhApcByCa: Apc + Ca => Ca + pApc; compartment*kPhApcA*Apc*Ca;
  PhApcByCb: Apc + Cb => Cb + pApc; compartment*kPhApcB*Apc*Cb;
  DppApc: pApc + B55 => B55 + Apc; compartment*kDpApc*pApc*B55;
  AsApcCdh: Cdh + Apc -> ApcCdh; compartment*(kAsACdh*Cdh*Apc - kDiACdh*ApcCdh);
  PhCdhApcByCa: ApcCdh => pCdh + Apc; compartment*kDpApc___f1(kPhCdhA, f2, ApcCdh, Ca);  // modifiers: Ca
  PhCAEByCe: ACE => pCdh + Emi + Apc; compartment*kDpApc___f1(kPhCdhE, f4, ACE, Ce);  // modifiers: Ce
  PhCAEByCa: ACE => pCdh + Emi + Apc; compartment*kDpApc___f1(kPhCdhA, f4, ACE, Ca);  // modifiers: Ca
  PhCAEByCb: ACE => pCdh + Emi + Apc; compartment*kDpApc___f1(kPhCdhB, f4, ACE, Cb);  // modifiers: Cb
  PhCpAEByCe: pACE => Emi + pCdh + pApc; compartment*kDpApc___f1(kPhCdhE, f4, pACE, Ce);  // modifiers: Ce
  PhCpAEByCa: pACE => Emi + pCdh + pApc; compartment*kDpApc___f1(kPhCdhA, f4, pACE, Ca);  // modifiers: Ca
  PhCpAEByCb: pACE => Emi + pCdh + pApc; compartment*kDpApc___f1(kPhCdhB, f4, pACE, Cb);  // modifiers: Cb
  PhCdhpApcByCe: pApcCdh => pCdh + pApc; compartment*kDpApc___f1(kPhCdhE, f2, pApcCdh, Ce);  // modifiers: Ce
  DppApcCdh: pApcCdh => ApcCdh; compartment*kDpApc___f1(kDpApc, f1, pApcCdh, B55);  // modifiers: B55
  AspApcCdh: pApc + Cdh -> pApcCdh; compartment*(kAsACdh*pApc*Cdh - kDiACdh*pApcCdh);
  DeEpAC1: pACE => pApcCdh; compartment*kDeEmi1*pACE;
  DeEpAC2: pACE => pApcCdh; compartment*kDeEmi2*pACE;
  PhEpACByCa: pACE => pEmi + pApcCdh; compartment*kDpApc___f1(kPhEmiA, f3, pACE, Ca);  // modifiers: Ca
  PhEpACByCb: pACE => pEmi + pApcCdh; compartment*kDpApc___f1(kPhEmiB, f3, pACE, Cb);  // modifiers: Cb
  AspACE: Emi + pApcCdh -> pACE; compartment*(kAsACE*Emi*pApcCdh - kDiACE*pACE);
  PhACEByCa: ACE => pACE; compartment*kDpApc___f1(kPhApcA, f1, ACE, Ca);  // modifiers: Ca
  PhACEByCb: ACE => pACE; compartment*kDpApc___f1(kPhApcB, f1, ACE, Cb);  // modifiers: Cb
  DppACE: pACE => ACE; compartment*kDpApc___f1(kDpApc, f1, pACE, B55);  // modifiers: B55
  PhEmiByCa: Emi + Ca => Ca + pEmi; compartment*kPhEmiA*Emi*Ca;
  PhEmiByCb: Emi + Cb => Cb + pEmi; compartment*kPhEmiB*Emi*Cb;
  DppEmi: pEmi => Emi; compartment*kDpEmi*pEmi;
  PhEACByCa: ACE => pEmi + ApcCdh; compartment*kDpApc___f1(kPhEmiA, f3, ACE, Ca);  // modifiers: Ca
  PhEACByCb: ACE => pEmi + ApcCdh; compartment*kDpApc___f1(kPhEmiB, f3, ACE, Cb);  // modifiers: Cb
  DepEmi1: pEmi => ; compartment*kDeEmi1*pEmi;
  DepEmi2: pEmi => ; compartment*kDeEmi3*pEmi;
  SyFox1: => Fox; compartment*Constant_flux__irreversible(kSyFox1);
  SyEmi2: E2fPx => E2fPx + Emi; compartment*kSyEmi2*E2fPx;
  AsACE: ApcCdh + Emi -> ACE; compartment*(kAsACE*ApcCdh*Emi - kDiACE*ACE);
  PhCdhByCe: Cdh + Ce => Ce + pCdh; compartment*kPhCdhE*Cdh*Ce;
  PhCdhByCa: Cdh + Ca => Ca + pCdh; compartment*kPhCdhA*Cdh*Ca;
  PhCdhByCb: Cdh + Cb => Cb + pCdh; compartment*kPhCdhB*Cdh*Cb;
  DppCdh: pCdh => Cdh; compartment*kDpCdh*pCdh;
  SyCa1: => Ca; compartment*Constant_flux__irreversible(kSyCa1);
  DeCa1: Ca => ; compartment*kDeCa1*Ca;
  DeCe3: Ce + Ca => Ca; compartment*kPhCeA*Ce*Ca;
  DeCa2_1: Ca + ApcCdh => ApcCdh; compartment*kDeCa2*Ca*ApcCdh; DeCa2_1 is "DeCa2.1";
  DeCa2_2: Ca + pApcCdh => pApcCdh; compartment*kDeCa2*Ca*pApcCdh; DeCa2_2 is "DeCa2.2";
  DeCa3: Ca + pApcCdc => pApcCdc; compartment*kDeCa3*Ca*pApcCdc;
  SyFox2: E2fPx => E2fPx + Fox; compartment*kSyFox2*E2fPx;
  DeFox1: Fox => ; compartment*kDeFox1*Fox;
  DeFox2_1: Fox + ApcCdh => ApcCdh; compartment*kDeFox2*Fox*ApcCdh; DeFox2_1 is "DeFox2.1";
  DepFox2_2: pFox + pApcCdh => pApcCdh; compartment*kDeFox2*pFox*pApcCdh; DepFox2_2 is "DepFox2.2";
  DepFox1: pFox => ; compartment*kDeFox1*pFox;
  DepFox2_1: pFox + ApcCdh => ApcCdh; compartment*kDeFox2*pFox*ApcCdh; DepFox2_1 is "DepFox2.1";
  DeFox2_2: Fox + pApcCdh => pApcCdh; compartment*kDeFox2*Fox*pApcCdh; DeFox2_2 is "DeFox2.2";
  PhFoxByCe: Fox + Ce => Ce + pFox; compartment*kPhFoxE*Fox*Ce;
  PhFoxByCa: Fox + Ca => Ca + pFox; compartment*kPhFoxA*Fox*Ca;
  PhFoxByCb: Fox + Cb => Cb + pFox; compartment*kPhFoxB*Fox*Cb;
  DppFox: pFox => Fox; compartment*kDpFox*pFox;
  SyCb1: => Cb; compartment*Constant_flux__irreversible(kSyCb1);
  SyCb2: pFoxPcb => pFoxPcb + Cb; compartment*kSyCb2*pFoxPcb;
  AsE2fPx: E2f + Px => E2f + E2fPx; compartment*kAsEPx*E2f*Px;
  DipFoxPcb: pFoxPcb => Pcb; compartment*kDiFPcb*pFoxPcb;
  DeCb1: Cb => ; compartment*kDeCb1*Cb;
  DeCb2_1: Cb + ApcCdh => ApcCdh; compartment*kDeCb2*Cb*ApcCdh; DeCb2_1 is "DeCb2.1";
  DeCb2_2: Cb + pApcCdh => pApcCdh; compartment*kDeCb2*Cb*pApcCdh; DeCb2_2 is "DeCb2.2";
  DeCb3: Cb + pApcCdc => pApcCdc; compartment*kDeCb3*Cb*pApcCdc;
  AspApcCdc20: pApc + Cdc20 -> pApcCdc; compartment*(kAspACdc*pApc*Cdc20 - kDipACdc*pApcCdc);
  DeCdcpApc1: pApcCdc => pApc; compartment*kDeCdc_1*pApcCdc;
  DeCdcpApc2_1: pApcCdc + ApcCdh => pApc + ApcCdh; compartment*kDeCdc_2*pApcCdc*ApcCdh; DeCdcpApc2_1 is "DeCdcpApc2.1";
  DeCdcpApc2_2: pApcCdc + pApcCdh => pApc + pApcCdh; compartment*kDeCdc_2*pApcCdc*pApcCdh; DeCdcpApc2_2 is "DeCdcpApc2.2";
  SyCdc20_1: => Cdc20; compartment*Constant_flux__irreversible(kSyCdc_1);
  SyCdc20_2: pFoxPcdc => pFoxPcdc + Cdc20; compartment*kSyCdc_2*pFoxPcdc;
  AspFoxPcdc: pFox + Pcdc => pFoxPcdc + pFox; compartment*kAsFPcdc*pFox*Pcdc;
  DipFoxPcdc: pFoxPcdc => Pcdc; compartment*kDiFPcdc*pFoxPcdc;
  PhCbByWee: Cb + Wee => Wee + pCb; compartment*kWee2*Cb*Wee;
  PhCbBypWee: Cb + pWee => pWee + pCb; compartment*kWee1*Cb*pWee;
  DppCbBypCdc25: pCb + pCdc25 => pCdc25 + Cb; compartment*kCdc25_2*pCb*pCdc25;
  DppCbByCdc25: pCb + Cdc25 => Cdc25 + Cb; compartment*kCdc25_1*pCb*Cdc25;
  DepCb1: pCb => ; compartment*kDeCb1*pCb;
  DepCb2_1: pCb + ApcCdh => ApcCdh; compartment*kDeCb2*pCb*ApcCdh; DepCb2_1 is "DepCb2.1";
  DepCb2_2: pCb + pApcCdh => pApcCdh; compartment*kDeCb2*pCb*pApcCdh; DepCb2_2 is "DepCb2.2";
  DepCb3: pCb + pApcCdc => pApcCdc; compartment*kDeCb3*pCb*pApcCdc;
  PhCdc25ByCb: Cdc25 + Cb => Cb + pCdc25; compartment*kPhC25B*Cdc25*Cb;
  PhCdc25ByCa: Cdc25 + Ca => Ca + pCdc25; compartment*kPhC25A*Cdc25*Ca;
  DppCdc25: pCdc25 + B55 => B55 + Cdc25; compartment*kDpCdc25*pCdc25*B55;
  DppWee: pWee + B55 => B55 + Wee; compartment*kDpWee*pWee*B55;
  PhWeeByCa: Wee + Ca => Ca + pWee; compartment*kPhWeeA*Wee*Ca;
  PhWeeByCb: Wee + Cb => Cb + pWee; compartment*kPhWeeB*Wee*Cb;
  PhGw: Gw + Cb => pGw + Cb; compartment*kPhGw*Gw*Cb;
  DppGw1: pGw => Gw; compartment*kDpGw1*pGw;
  DppGw2: pGw + B55 => B55 + Gw; compartment*kDpGw2*pGw*B55;
  PhEnsa: Ensa + pGw => pGw + pEnsa; compartment*kPhEnsa*Ensa*pGw;
  AspEB55: pEnsa + B55 -> pEB55; compartment*(kAspEB55*pEnsa*B55 - kDipEB55*pEB55);
  DppEB55: pEB55 => B55 + Ensa; compartment*kDpEnsa*pEB55;
  SyEmi1: => Emi; compartment*Constant_flux__irreversible(kSyEmi1);
  SyCe2: E2fPx => E2fPx + Ce; compartment*kSyCe2*E2fPx;
  DeCdc20_1: Cdc20 => ; compartment*kDeCdc_1*Cdc20;
  DeCdc20_2_1: Cdc20 + ApcCdh => ApcCdh; compartment*kDeCdc_2*Cdc20*ApcCdh; DeCdc20_2_1 is "DeCdc20_2.1";
  DeCdc20_2_2: Cdc20 + pApcCdh => pApcCdh; compartment*kDeCdc_2*Cdc20*pApcCdh; DeCdc20_2_2 is "DeCdc20_2.2";
  DppE2f2: pE2f + B55 => E2f + B55; compartment*kDpE2f2*pE2f*B55;
  PhCdhpApcByCa: pApcCdh => pCdh + pApc; compartment*kDpApc___f1(kPhCdhA, f2, pApcCdh, Ca);  // modifiers: Ca
  PhCdhpApcByCb: pApcCdh => pCdh + pApc; compartment*kDpApc___f1(kPhCdhB, f2, pApcCdh, Cb);  // modifiers: Cb
  PhCdhApcByCe: ApcCdh => pCdh + Apc; compartment*kDpApc___f1(kPhCdhE, f2, ApcCdh, Ce);  // modifiers: Ce
  PhCdhApcByCb: ApcCdh => pCdh + Apc; compartment*kDpApc___f1(kPhCdhB, f2, ApcCdh, Cb);  // modifiers: Cb
  DeEAC1: ACE => ApcCdh; compartment*kDeEmi1*ACE;
  DeEAC2: ACE => ApcCdh; compartment*kDeEmi2*ACE;
  PhApcCdhByCa: ApcCdh => pApcCdh; compartment*kDpApc___f1(kPhApcA, f1, ApcCdh, Ca);  // modifiers: Ca
  PhApcCdhByCb: ApcCdh => pApcCdh; compartment*kDpApc___f1(kPhApcB, f1, ApcCdh, Cb);  // modifiers: Cb
  DeEmi1: Emi => ; compartment*kDeEmi1*Emi;

  // Unit definitions:
  unit volume = 1e-3 litre;
  unit time = 60 second;
  unit substance = 1e-3 mole;
end
