// SBML level 3 version 1

function max(x, y)
  piecewise(x, x > y, y);
end
max is "minimum";

function min(x, y)
  piecewise(x, x < y, y);
end
min is "maximum";

function heav(x)
  piecewise(0, x < 0, 0.5, x == 0, 1, x > 0, 0);
end
heav is "heavyside";

function mod(x, y)
  piecewise(x - y*ceil(x/y), xor(x < 0, y < 0), x - y*floor(x/y));
end
mod is "modulo";

model main()
  // XPP model
  // This model was converted from XPP ode format to SBML using sbmlutils-0.3.7.
  // ### MODEL NAME
  // # G2M
  // ### MODEL NOTES
  // # This model was taken from the paper "Model scenarios for switch-like mitotic transitions" published by Vinod and Novak in 2015
  // # This model can be used to reproduce Fig. 4C-D.
  // # The model shows how tCb flips the G2/M toggle between Cb and B55. The switch is required
  // # for rapid Cb activation. The toggle comprises B55 and pENSA, which mutually inhibit each other. The excess
  // # of tENSA over B55 provides nonlinearity (this is an alternative to modelling Cdk1 phosphorylation as a Goldbeter-
  // # Koshland cycle unsing Michaelis-Menten kinetics (which is (a) probably unrealistic for protein-protein interaction
  // # networks unless [Cdk1], is much higher than [Wee1 or Cdc25], and (b) probably wrong, because experimental
  // # inhibition of the greatwall pathway removes bistability))).
  // ### Relation to other models:
  // # Sister model G2M_2D is the 2D version with steady state approximations.
  // ### Major assumptions:
  // # All reactions (even non elementary reactions) are best modelled with mass action kinetics for all reactions.
  // # Protein expression takes no time.
  // # Levels of tEnsa, tB55, tGw, tWee, tCdc25 and tDna are constant. Their degradation rate is incorporated in
  // # the corresponding dephosphorylation and dissociation rates.
  // # B55 invokes negative feedback at two steps: (1) at Gw and (2) at Wee/Cdc25
  // ### Variables (quantities of dimension concentration given in the arbitrary units shown in square brackets):
  // # pEnsa: phosporylated Ensa (endosulfine & cAMP regulated phosphoprotein 19), incl. pEnsaB55; [ensa]
  // # Cb: active cyclin B-Cdk1 complex; [b]
  // # B55: free protein phosphatase 2A-B55 (a hetrotrimeric enzyme complex); [ensa]
  // # pGw: phosphorylated Greatwall 1; [gw]
  // # pEB55: pEnsa-B55 complex; [ensa]
  // ### Parameter description:
  // # kPhEnsa, kDpEnsa: phosphorylation efficiency (k_cat/other substrates) and dephosphorylation rate of Ensa; [1/(min*gw)], [1/min]
  // # tEnsa: total amount of Ensa in the system; [ensa]
  // # tCb: concentration of total Cb in the system; [b]
  // # tB55; [ensa]
  // # kPhGw, kDpGw1, kDpGw2: phosphorylation, background dephosphorylation, and B55 mediated dephosphorylation
  // # efficiencies of Gw; [1/(min*b)], [1/min], [1/(min*ensa)]
  // # tGw: concentration of total Gw in the system; [gw]
  // # kWee1, kWee2: inactive Wee1 and active Wee mediated phosphorylation efficiencies of Cb times concentration of
  // # inactive Wee1 and active Wee, respectively; [1/min]
  // # kPhWee, kDpWee: Cb mediated phosphorylation and B55 mediated dephosphorylation efficiencies of Wee; [1/(min*b)], [1/(min*ensa)]
  // # kCdc25_1=0.1, kCdc25_2=1: Cdc25 mediated dephosphorylation efficiencies of Cb times concentration of inactive
  // # and active Cdc25, respectively; [1/min]
  // # kPhCdc25, kDpCdc25: Cb mediated phosphorylation and B55 mediated dephosphorylation efficiencies
  // # of Cdc25; [1/(min*b)], [1/(min*ensa)]
  // # kDipEB55, kAspEB55: dissociation and association rate constants of pEB55; [1/min], [1/(min*ensa)]
  // ### Idea behind parameter values:
  // # Parameters shall be biologically reasonable. Experimental values from https://elifesciences.org/articles/01695
  // # were used where applicable.
  // # tCb shall be in the interval [0, 1]
  // ##################################################################################
  // ### MODEL STATES
  // pEnsa' = kPhEnsa*pGw*(tEnsa - pEnsa) - kDpEnsa*pEB55
  // Cb' = (kCdc25_1 + (kCdc25_2 - kCdc25_1)*pCdc25)*(tCb - Cb) - (kWee1 + (kWee2-kWee1)*Wee) * Cb
  // pGw' = kPhGw*Cb*(tGw-pGw) - (kDpGw1+kDpGw2*B55)*pGw
  // pEB55' = kAspEB55*B55*(pEnsa - pEB55) - (kDipEB55 + kDpEnsa)*pEB55
  // Wee' = kDpWee * B55 * (tWee - Wee) - kPhWee * Cb * Wee
  // pCdc25' = kPhCdc25*Cb*(tCdc25-pCdc25) - kDpCdc25*pCdc25*B55
  // ### INITIAL CONDITIONS (to be taken from RP-G1S_v2)
  // init pEnsa = 0.01, Cb = 0.01
  // ### ALGEBRAIC EQUATIONS
  // # Mass conservations:
  // B55 = tB55 - pEB55
  // # Substitutions
  // # rWee = kWee1 + (kWee2-kWee1)*kDpWee*B55/(kDpWee*B55 + kPhWee*Cb)
  // # rCdc25 = kCdc25_1 + (kCdc25_2-kCdc25_1)*(kPhCdc25*Cb)/(kPhCdc25*Cb + kDpCdc25*B55)
  // ### AUXILIARY QUANTITIES (for plotting purposes)
  // aux B55_ = B55
  // aux pGw_ = pGw
  // aux pEB55_ = pEB55
  // ### MODEL PARAMETERS
  // par tCb=0.8 , tWee = 1, tCdc25 = 1
  // par kPhEnsa=0.1, kDpEnsa=0.05
  // par tEnsa=1
  // par tB55=0.25
  // par kPhGw=1, kDpGw1=0.25, kDpGw2=10
  // par tGw=1
  // par kWee1=0.01, kWee2=1, kPhWee=1, kDpWee=10
  // par kCdc25_1=0.1, kCdc25_2=1, kPhCdc25=1, kDpCdc25=10
  // par kDipEB55=0.0068, kAspEB55=57
  // ### XppAut SETTINGS
  // @ Method=stiff, Total=1200, Bounds=100, Dt=1
  // @ xp=time, yp=Cb, xlo=0, xhi=300, ylo=0, yhi=1, nmesh=400
  // @ Nplot=4, Yp1=pEnsa, Yp2=Cb, Yp3=B55_, Yp4=pGw_
  // @ Ntst=150, Nmax=1000000, Npr=1000
  // @ Ds=.001, Dsmin=.0001, Dsmax=.005, ParMin=0, ParMax=1
  // @ AutoVar=Cb, AutoXmin=0, AutoXmax=1, AutoYmin=0, AutoYmax=1
  // done
  // This file has been produced by sbmlutils.
  // Terms of use
  // Copyright © 2017 Matthias Koenig
  // Redistribution and use of any part of this model, with or without modification, are permitted provided that the following conditions are met:
  // Redistributions of this SBML file must retain the above copyright notice, this list of conditions and the following disclaimer.
  // Redistributions in a different form must reproduce the above copyright notice, this list of conditions and the following disclaimer in the documentation and/or other materials provided with the distribution.
  // This model is distributed in the hope that it will be useful, but WITHOUT ANY WARRANTY; without even the implied warranty of MERCHANTABILITY or FITNESS FOR A PARTICULAR PURPOSE.

  // Parameters:
  pEnsa = 0.01; pEnsa is "pEnsa = 0.01";
  Cb = 0.01; Cb is "Cb = 0.01";
  tCb = 0.8; tCb is "tCb = 0.8";
  tWee = 1; tWee is "tWee = 1";
  tCdc25 = 1; tCdc25 is "tCdc25 = 1";
  kPhEnsa = 0.1; kPhEnsa is "kPhEnsa = 0.1";
  kDpEnsa = 0.05; kDpEnsa is "kDpEnsa = 0.05";
  tEnsa = 1; tEnsa is "tEnsa = 1";
  tB55 = 0.25; tB55 is "tB55 = 0.25";
  kPhGw = 1; kPhGw is "kPhGw = 1";
  kDpGw1 = 0.25; kDpGw1 is "kDpGw1 = 0.25";
  kDpGw2 = 10; kDpGw2 is "kDpGw2 = 10";
  tGw = 1; tGw is "tGw = 1";
  kWee1 = 0.01; kWee1 is "kWee1 = 0.01";
  kWee2 = 1; kWee2 is "kWee2 = 1";
  kPhWee = 1; kPhWee is "kPhWee = 1";
  kDpWee = 10; kDpWee is "kDpWee = 10";
  kCdc25_1 = 0.1; kCdc25_1 is "kCdc25_1 = 0.1";
  kCdc25_2 = 1; kCdc25_2 is "kCdc25_2 = 1";
  kPhCdc25 = 1; kPhCdc25 is "kPhCdc25 = 1";
  kDpCdc25 = 10; kDpCdc25 is "kDpCdc25 = 10";
  kDipEB55 = 0.0068; kDipEB55 is "kDipEB55 = 0.0068";
  kAspEB55 = 57; kAspEB55 is "kAspEB55 = 57";
  pGw = 0 dimensionless;
  pEB55 = 0 dimensionless;
  Wee = 0 dimensionless;
  pCdc25 = 0 dimensionless;
  B55 has dimensionless;
  B55_ has dimensionless;
  pGw_ has dimensionless;
  pEB55_ has dimensionless;
  t has dimensionless; t is "model time";

  // Assignment rules:
  B55 := tB55 - pEB55;
  B55_ := B55;
  pGw_ := pGw;
  pEB55_ := pEB55;
  t := time;

  // Rate rules:
  pEnsa' = kPhEnsa*pGw*(tEnsa - pEnsa) - kDpEnsa*pEB55;
  Cb' = (kCdc25_1 + (kCdc25_2 - kCdc25_1)*pCdc25)*(tCb - Cb) - (kWee1 + (kWee2 - kWee1)*Wee)*Cb;
  pGw' = kPhGw*Cb*(tGw - pGw) - (kDpGw1 + kDpGw2*B55)*pGw;
  pEB55' = kAspEB55*B55*(pEnsa - pEB55) - (kDipEB55 + kDpEnsa)*pEB55;
  Wee' = kDpWee*B55*(tWee - Wee) - kPhWee*Cb*Wee;
  pCdc25' = kPhCdc25*Cb*(tCdc25 - pCdc25) - kDpCdc25*pCdc25*B55;
end
