// SBML level 3 version 1

function max_(x, y)
  piecewise(x, x > y, y);
end

function min_(x, y)
  piecewise(x, x < y, y);
end

function heav(x)
  piecewise(0, x < 0, 0.5, x == 0, 1, x > 0, 0);
end

function mod(x, y)
  piecewise(x - y*ceil(x/y), xor(x < 0, y < 0), x - y*floor(x/y));
end

model doc0()

  // Parameters:
  B55 has dimensionless;
  tB55 = 0.25; tB55 is "tB55 = 0.25";
  pEB55 = 0 dimensionless;
  B55_ has dimensionless;
  pGw_ has dimensionless;
  pGw = 0 dimensionless;
  pEB55_ has dimensionless;
  t has dimensionless; t is "model time";
  pEnsa = 0.01; pEnsa is "pEnsa = 0.01";
  kPhEnsa = 0.1; kPhEnsa is "kPhEnsa = 0.1";
  tEnsa = 1; tEnsa is "tEnsa = 1";
  kDpEnsa = 0.05; kDpEnsa is "kDpEnsa = 0.05";
  kPhGw = 1; kPhGw is "kPhGw = 1";
  Cb = 0.01; Cb is "Cb = 0.01";
  tGw = 1; tGw is "tGw = 1";
  kDpGw1 = 0.25; kDpGw1 is "kDpGw1 = 0.25";
  kDpGw2 = 10; kDpGw2 is "kDpGw2 = 10";
  kAspEB55 = 57; kAspEB55 is "kAspEB55 = 57";
  kDipEB55 = 0.0068; kDipEB55 is "kDipEB55 = 0.0068";
  kCdc25_1 = 0.1; kCdc25_1 is "kCdc25_1 = 0.1";
  kCdc25_2 = 1; kCdc25_2 is "kCdc25_2 = 1";
  pCdc25 = 0 dimensionless;
  tCb = 0.8; tCb is "tCb = 0.8";
  kWee1 = 0.01; kWee1 is "kWee1 = 0.01";
  kWee2 = 1; kWee2 is "kWee2 = 1";
  Wee = 0 dimensionless;
  kPhCdc25 = 1; kPhCdc25 is "kPhCdc25 = 1";
  tCdc25 = 1; tCdc25 is "tCdc25 = 1";
  kDpCdc25 = 10; kDpCdc25 is "kDpCdc25 = 10";
  kDpWee = 10; kDpWee is "kDpWee = 10";
  tWee = 1; tWee is "tWee = 1";
  kPhWee = 1; kPhWee is "kPhWee = 1";

  // Assignment rules:
  B55 := tB55 - pEB55;
  B55_ := B55;
  pGw_ := pGw;
  pEB55_ := pEB55;
  t := time;

  // Rate rules:
  pEB55' = kAspEB55*B55*(pEnsa - pEB55) - (kDipEB55 + kDpEnsa)*pEB55;
  pGw' = kPhGw*Cb*(tGw - pGw) - (kDpGw1 + kDpGw2*B55)*pGw;
  pEnsa' = kPhEnsa*pGw*(tEnsa - pEnsa) - kDpEnsa*pEB55;
  Cb' = (kCdc25_1 + (kCdc25_2 - kCdc25_1)*pCdc25)*(tCb - Cb) - (kWee1 + (kWee2 - kWee1)*Wee)*Cb;
  pCdc25' = kPhCdc25*Cb*(tCdc25 - pCdc25) - kDpCdc25*pCdc25*B55;
  Wee' = kDpWee*B55*(tWee - Wee) - kPhWee*Cb*Wee;
end
