// SBML level 3 version 1

model __main()

  // Compartments:
  compartment default_compartment = 1;

  // Species:
  species Rb in default_compartment = 0.08763959;
  species pRb in default_compartment = 0.8407465;
  species pE2fRb in default_compartment = 0.0001504964;
  species E2fRb in default_compartment = 0.07146342;
  species Pcb in default_compartment = 0.9980968;
  species pFoxPcb in default_compartment = 0.001903236;
  species ACE in default_compartment = 0.1089464;
  species Apc in default_compartment = 4.0288;
  species ApcCdh in default_compartment = 0.71357;
  species pACE in default_compartment = 0.002210822;
  species pApc in default_compartment = 0.06303509;
  species pApcCdc in default_compartment = 0.06984158;
  species pApcCdh in default_compartment = 0.01359638;
  species Cdh in default_compartment = 0.0005712963;
  species pCdh in default_compartment = 0.1611051;
  species Ensa in default_compartment = 0.8268805;
  species pEB55 in default_compartment = 0.1727911;
  species pEnsa in default_compartment = 0.0003284259;
  species B55 in default_compartment = 0.07720891;
  species Gw in default_compartment = 0.997527;
  species pGw in default_compartment = 0.002472956;
  species Cdc25 in default_compartment = 0.9815874;
  species pCdc25 in default_compartment = 0.01841257;
  species pWee in default_compartment = 0.0195325;
  species Wee in default_compartment = 0.9804675;
  species E2fPx in default_compartment = 0.1552192;
  species Px in default_compartment = 0.8447808;
  species Pcdc in default_compartment = 0.9992382;
  species pFoxPcdc in default_compartment = 0.0007618445;
  species Cb in default_compartment = 0.001882065;
  species pCb in default_compartment = 0.00751336;
  species Emi in default_compartment = 0.0007178044;
  species pEmi in default_compartment = 1.880259e-5;
  species Cdc20 in default_compartment = 0.2299825;
  species E2f in default_compartment = 0.01848035;
  species pFox in default_compartment = 0.0003811118;
  species Ce in default_compartment = 0.2322585;
  species Ca in default_compartment = 0.007028632;
  species pE2f in default_compartment = 3.807286e-5;
  species Fox in default_compartment = 0.005564736;

  // Parameters:
  kSyE2f1 = 0.001;
  kAsFPcb = 50;
  kSyE2f2 = 0.01;
  kDeE2f1 = 0.01;
  kDiEPx = 5;
  kAsE2fRb = 50;
  kDiE2fRb = 0.05;
  kPhRbD = 0.8;
  Cd = 1;
  kPhRbE = 1;
  kPhRb = 3;
  kPhE2f = 0.2;
  kDpE2f1 = 0;
  kDpE2f2 = 10;
  kDeE2f2 = 0.2;
  kSyCe1 = 0.002;
  kSyCa2 = 0.0075;
  kDeCe = 0.02;
  kPhCeE = 0.01;
  kDpRb = 0.2;
  kDpApc = 5;
  kPhApcA = 0.01;
  kPhApcB = 0.01;
  kAsACdh = 50;
  kDiACdh = 0.05;
  kPhCdhA = 2.5;
  kPhCdhE = 0.1;
  kPhCdhB = 25;
  kDeEmi1 = 0.05;
  kDeEmi2 = 0.05;
  kPhEmiA = 0.005;
  kPhEmiB = 0.025;
  kAsACE = 50;
  kDiACE = 0.05;
  kDpEmi = 0.0005;
  kDeEmi3 = 0.5;
  kSyFox1 = 0.001;
  kSyEmi2 = 0.05;
  kDpCdh = 0.5;
  kSyCa1 = 0.001;
  kDeCa1 = 0.001;
  kPhCeA = 1;
  kDeCa2 = 0.4;
  kDeCa3 = 0.1;
  kSyFox2 = 0.0075;
  kDeFox1 = 0.001;
  kDeFox2 = 0.5;
  kPhFoxE = 0.1;
  kPhFoxA = 0.1;
  kPhFoxB = 0.5;
  kDpFox = 0.005;
  kSyCb1 = 0.001;
  kSyCb2 = 0.0075;
  kAsEPx = 50;
  kDiFPcb = 10;
  kDeCb1 = 0.001;
  kDeCb2 = 0.125;
  kDeCb3 = 0.125;
  kAspACdc = 1;
  kDipACdc = 0.125;
  kDeCdc_1 = 0.004;
  kDeCdc_2 = 0.04;
  kSyCdc_1 = 0.001;
  kSyCdc_2 = 0.01;
  kAsFPcdc = 50;
  kDiFPcdc = 25;
  kWee2 = 1;
  kWee1 = 0.01;
  kCdc25_2 = 1;
  kCdc25_1 = 0.1;
  kPhC25B = 1;
  kPhC25A = 0;
  kDpCdc25 = 10;
  kDpWee = 10;
  kPhWeeA = 0.1;
  kPhWeeB = 1;
  kPhGw = 1;
  kDpGw1 = 0.25;
  kDpGw2 = 10;
  kPhEnsa = 0.1;
  kAspEB55 = 57;
  kDipEB55 = 0.0068;
  kDpEnsa = 0.05;
  kSyEmi1 = 0.005;
  kSyCe2 = 0.06;

  // Assignment rules:
  tRb := Rb + pRb + pE2fRb + E2fRb;
  tPcb := Pcb + pFoxPcb;
  tApc := ACE + Apc + ApcCdh + pACE + pApc + pApcCdc + pApcCdh;
  t_pApc := pACE + pApc + pApcCdc + pApcCdh;
  tCdh := ACE + ApcCdh + Cdh + pACE + pApcCdh + pCdh;
  tEnsa := Ensa + pEB55 + pEnsa;
  tB55 := B55 + pEB55;
  tGw := Gw + pGw;
  tCdc25 := Cdc25 + pCdc25;
  tWee := pWee + Wee;
  tPx := E2fPx + Px;
  tPcdc := Pcdc + pFoxPcdc;
  tCb := Cb + pCb;
  tEmi := ACE + Emi + pACE + pEmi;
  tCdc20 := Cdc20 + pApcCdc;

  // Reactions:
  SyE2f1: => E2f; kSyE2f1;
  AspFoxPcb: pFox + Pcb => pFox + pFoxPcb; kAsFPcb*pFox*Pcb;
  SyE2f2: E2fPx => E2fPx + E2f; kSyE2f2*E2fPx;
  DeE2f: E2f => ; kDeE2f1*E2f;
  DiE2fPx: E2fPx => Px; kDiEPx*E2fPx;
  AsE2fRb: E2f + Rb -> E2fRb; kAsE2fRb*E2f*Rb - kDiE2fRb*E2fRb;
  PhRbE2fByCd: E2fRb => E2f + pRb; kPhRbD*E2fRb*Cd;
  PhRbE2fByCe: E2fRb + Ce => E2f + pRb + Ce; kPhRbE*E2fRb*Ce;
  PhRbE2fByCa: E2fRb + Ca => E2f + pRb + Ca; kPhRb*E2fRb*Ca;
  PhRbE2fByCb: E2fRb + Cb => E2f + pRb + Cb; kPhRb*E2fRb*Cb;
  PhE2fByCa: E2f + Ca => pE2f + Ca; kPhE2f*E2f*Ca;
  PhE2fByCb: E2f + Cb => pE2f + Cb; kPhE2f*E2f*Cb;
  DppE2f1: pE2f => E2f; kDpE2f1*pE2f;
  DppE2fRb2: pE2fRb + B55 => E2fRb + B55; kDpE2f2*pE2fRb*B55;
  DepE2f1: pE2f => ; kDeE2f1*pE2f;
  DepE2f2: pE2f => ; kDeE2f2*pE2f;
  AspE2fRb: pE2f + Rb -> pE2fRb; kAsE2fRb*pE2f*Rb - kDiE2fRb*pE2fRb;
  PhRbpE2fByCd: pE2fRb => pE2f + pRb; kPhRbD*pE2fRb*Cd;
  PhRbpE2fByCa: pE2fRb + Ca => pE2f + pRb + Ca; kPhRb*pE2fRb*Ca;
  PhRbpE2fByCb: pE2fRb + Cb => pE2f + pRb + Cb; kPhRb*pE2fRb*Cb;
  PhRbpE2fByCe: pE2fRb + Ce => pE2f + pRb + Ce; kPhRbE*pE2fRb*Ce;
  PhE2fRbByCa: E2fRb + Ca => pE2fRb + Ca; kPhE2f*E2fRb*Ca;
  PhE2fRbByCb: E2fRb + Cb => pE2fRb + Cb; kPhE2f*E2fRb*Cb;
  DppE2fRb1: pE2fRb => E2fRb; kDpE2f1*pE2fRb;
  DeE2fRb: E2fRb => Rb; kDeE2f1*E2fRb;
  DepE2fRb1: pE2fRb => Rb; kDeE2f1*pE2fRb;
  DepE2fRb2: pE2fRb => Rb; kDeE2f2*pE2fRb;
  PhRbByCd: Rb => pRb; kPhRbD*Rb*Cd;
  PhRbByCe: Rb + Ce => pRb + Ce; kPhRbE*Rb*Ce;
  PhRbByCa: Rb + Ca => pRb + Ca; kPhRb*Rb*Ca;
  PhRbByCb: Rb + Cb => pRb + Cb; kPhRb*Rb*Cb;
  SyCe1: => Ce; kSyCe1;
  SyCa2: E2fPx => E2fPx + Ca; kSyCa2*E2fPx;
  DeCe1: Ce => ; kDeCe*Ce;
  DeCe2: 2 Ce => Ce; kPhCeE*Ce^2;
  DpRb: pRb => Rb; kDpRb*pRb;
  DppApcCdc20: pApcCdc => Cdc20 + Apc; kDpApc*pApcCdc*B55;  // modifiers: B55
  PhApcByCa: Apc + Ca => Ca + pApc; kPhApcA*Apc*Ca;
  PhApcByCb: Apc + Cb => Cb + pApc; kPhApcB*Apc*Cb;
  DppApc: pApc + B55 => B55 + Apc; kDpApc*pApc*B55;
  AsApcCdh: Cdh + Apc -> ApcCdh; kAsACdh*Cdh*Apc - kDiACdh*ApcCdh;
  PhCdhApcByCa: ApcCdh => pCdh + Apc; kPhCdhA*ApcCdh*Ca;  // modifiers: Ca
  PhCAEByCe: ACE => pCdh + Emi + Apc; kPhCdhE*ACE*Ce*0.8;  // modifiers: Ce
  PhCAEByCa: ACE => pCdh + Emi + Apc; kPhCdhA*ACE*Ca*0.8;  // modifiers: Ca
  PhCAEByCb: ACE => pCdh + Emi + Apc; kPhCdhB*ACE*Cb*0.8;  // modifiers: Cb
  PhCpAEByCe: pACE => Emi + pCdh + pApc; kPhCdhE*pACE*Ce*0.8;  // modifiers: Ce
  PhCpAEByCa: pACE => Emi + pCdh + pApc; kPhCdhA*pACE*Ca*0.8;  // modifiers: Ca
  PhCpAEByCb: pACE => Emi + pCdh + pApc; kPhCdhB*pACE*Cb*0.8;  // modifiers: Cb
  PhCdhpApcByCe: pApcCdh => pCdh + pApc; kPhCdhE*pApcCdh*Ce;  // modifiers: Ce
  DppApcCdh: pApcCdh => ApcCdh; kDpApc*pApcCdh*B55;  // modifiers: B55
  AspApcCdh: pApc + Cdh -> pApcCdh; kAsACdh*pApc*Cdh - kDiACdh*pApcCdh;
  DeEpAC1: pACE => pApcCdh; kDeEmi1*pACE;
  DeEpAC2: pACE => pApcCdh; kDeEmi2*pACE;
  PhEpACByCa: pACE => pEmi + pApcCdh; kPhEmiA*pACE*Ca;  // modifiers: Ca
  PhEpACByCb: pACE => pEmi + pApcCdh; kPhEmiB*pACE*Cb;  // modifiers: Cb
  AspACE: Emi + pApcCdh -> pACE; kAsACE*Emi*pApcCdh - kDiACE*pACE;
  PhACEByCa: ACE => pACE; kPhApcA*ACE*Ca;  // modifiers: Ca
  PhACEByCb: ACE => pACE; kPhApcB*ACE*Cb;  // modifiers: Cb
  DppACE: pACE => ACE; kDpApc*pACE*B55;  // modifiers: B55
  PhEmiByCa: Emi + Ca => Ca + pEmi; kPhEmiA*Emi*Ca;
  PhEmiByCb: Emi + Cb => Cb + pEmi; kPhEmiB*Emi*Cb;
  DppEmi: pEmi => Emi; kDpEmi*pEmi;
  PhEACByCa: ACE => pEmi + ApcCdh; kPhEmiA*ACE*Ca;  // modifiers: Ca
  PhEACByCb: ACE => pEmi + ApcCdh; kPhEmiB*ACE*Cb;  // modifiers: Cb
  DepEmi1: pEmi => ; kDeEmi1*pEmi;
  DepEmi2: pEmi => ; kDeEmi3*pEmi;
  SyFox1: => Fox; kSyFox1;
  SyEmi2: E2fPx => E2fPx + Emi; kSyEmi2*E2fPx;
  AsACE: ApcCdh + Emi -> ACE; kAsACE*ApcCdh*Emi - kDiACE*ACE;
  PhCdhByCe: Cdh + Ce => Ce + pCdh; kPhCdhE*Cdh*Ce;
  PhCdhByCa: Cdh + Ca => Ca + pCdh; kPhCdhA*Cdh*Ca;
  PhCdhByCb: Cdh + Cb => Cb + pCdh; kPhCdhB*Cdh*Cb;
  DppCdh: pCdh => Cdh; kDpCdh*pCdh;
  SyCa1: => Ca; kSyCa1;
  DeCa1: Ca => ; kDeCa1*Ca;
  DeCe3: Ce + Ca => Ca; kPhCeA*Ce*Ca;
  DeCa2_1: Ca + ApcCdh => ApcCdh; kDeCa2*Ca*ApcCdh;
  DeCa2_2: Ca + pApcCdh => pApcCdh; kDeCa2*Ca*pApcCdh;
  DeCa3: Ca + pApcCdc => pApcCdc; kDeCa3*Ca*pApcCdc;
  SyFox2: E2fPx => E2fPx + Fox; kSyFox2*E2fPx;
  DeFox1: Fox => ; kDeFox1*Fox;
  DeFox2_1: Fox + ApcCdh => ApcCdh; kDeFox2*Fox*ApcCdh;
  DepFox2_2: pFox + pApcCdh => pApcCdh; kDeFox2*pFox*pApcCdh;
  DepFox1: pFox => ; kDeFox1*pFox;
  DepFox2_1: pFox + ApcCdh => ApcCdh; kDeFox2*pFox*ApcCdh;
  DeFox2_2: Fox + pApcCdh => pApcCdh; kDeFox2*Fox*pApcCdh;
  PhFoxByCe: Fox + Ce => Ce + pFox; kPhFoxE*Fox*Ce;
  PhFoxByCa: Fox + Ca => Ca + pFox; kPhFoxA*Fox*Ca;
  PhFoxByCb: Fox + Cb => Cb + pFox; kPhFoxB*Fox*Cb;
  DppFox: pFox => Fox; kDpFox*pFox;
  SyCb1: => Cb; kSyCb1;
  SyCb2: pFoxPcb => pFoxPcb + Cb; kSyCb2*pFoxPcb;
  AsE2fPx: E2f + Px => E2f + E2fPx; kAsEPx*E2f*Px;
  DipFoxPcb: pFoxPcb => Pcb; kDiFPcb*pFoxPcb;
  DeCb1: Cb => ; kDeCb1*Cb;
  DeCb2_1: Cb + ApcCdh => ApcCdh; kDeCb2*Cb*ApcCdh;
  DeCb2_2: Cb + pApcCdh => pApcCdh; kDeCb2*Cb*pApcCdh;
  DeCb3: Cb + pApcCdc => pApcCdc; kDeCb3*Cb*pApcCdc;
  AspApcCdc20: pApc + Cdc20 -> pApcCdc; kAspACdc*pApc*Cdc20 - kDipACdc*pApcCdc;
  DeCdcpApc1: pApcCdc => pApc; kDeCdc_1*pApcCdc;
  DeCdcpApc2_1: pApcCdc + ApcCdh => pApc + ApcCdh; kDeCdc_2*pApcCdc*ApcCdh;
  DeCdcpApc2_2: pApcCdc + pApcCdh => pApc + pApcCdh; kDeCdc_2*pApcCdc*pApcCdh;
  SyCdc20_1: => Cdc20; kSyCdc_1;
  SyCdc20_2: pFoxPcdc => pFoxPcdc + Cdc20; kSyCdc_2*pFoxPcdc;
  AspFoxPcdc: pFox + Pcdc => pFoxPcdc + pFox; kAsFPcdc*pFox*Pcdc;
  DipFoxPcdc: pFoxPcdc => Pcdc; kDiFPcdc*pFoxPcdc;
  PhCbByWee: Cb + Wee => Wee + pCb; kWee2*Cb*Wee;
  PhCbBypWee: Cb + pWee => pWee + pCb; kWee1*Cb*pWee;
  DppCbBypCdc25: pCb + pCdc25 => pCdc25 + Cb; kCdc25_2*pCb*pCdc25;
  DppCbByCdc25: pCb + Cdc25 => Cdc25 + Cb; kCdc25_1*pCb*Cdc25;
  DepCb1: pCb => ; kDeCb1*pCb;
  DepCb2_1: pCb + ApcCdh => ApcCdh; kDeCb2*pCb*ApcCdh;
  DepCb2_2: pCb + pApcCdh => pApcCdh; kDeCb2*pCb*pApcCdh;
  DepCb3: pCb + pApcCdc => pApcCdc; kDeCb3*pCb*pApcCdc;
  PhCdc25ByCb: Cdc25 + Cb => Cb + pCdc25; kPhC25B*Cdc25*Cb;
  PhCdc25ByCa: Cdc25 + Ca => Ca + pCdc25; kPhC25A*Cdc25*Ca;
  DppCdc25: pCdc25 + B55 => B55 + Cdc25; kDpCdc25*pCdc25*B55;
  DppWee: pWee + B55 => B55 + Wee; kDpWee*pWee*B55;
  PhWeeByCa: Wee + Ca => Ca + pWee; kPhWeeA*Wee*Ca;
  PhWeeByCb: Wee + Cb => Cb + pWee; kPhWeeB*Wee*Cb;
  PhGw: Gw + Cb => pGw + Cb; kPhGw*Gw*Cb;
  DppGw1: pGw => Gw; kDpGw1*pGw;
  DppGw2: pGw + B55 => B55 + Gw; kDpGw2*pGw*B55;
  PhEnsa: Ensa + pGw => pGw + pEnsa; kPhEnsa*Ensa*pGw;
  AspEB55: pEnsa + B55 -> pEB55; kAspEB55*pEnsa*B55 - kDipEB55*pEB55;
  DppEB55: pEB55 => B55 + Ensa; kDpEnsa*pEB55;
  SyEmi1: => Emi; kSyEmi1;
  SyCe2: E2fPx => E2fPx + Ce; kSyCe2*E2fPx;
  DeCdc20_1: Cdc20 => ; kDeCdc_1*Cdc20;
  DeCdc20_2_1: Cdc20 + ApcCdh => ApcCdh; kDeCdc_2*Cdc20*ApcCdh;
  DeCdc20_2_2: Cdc20 + pApcCdh => pApcCdh; kDeCdc_2*Cdc20*pApcCdh;
  DppE2f2: pE2f + B55 => E2f + B55; kDpE2f2*pE2f*B55;
  PhCdhpApcByCa: pApcCdh => pCdh + pApc; kPhCdhA*pApcCdh*Ca;  // modifiers: Ca
  PhCdhpApcByCb: pApcCdh => pCdh + pApc; kPhCdhB*pApcCdh*Cb;  // modifiers: Cb
  PhCdhApcByCe: ApcCdh => pCdh + Apc; kPhCdhE*ApcCdh*Ce;  // modifiers: Ce
  PhCdhApcByCb: ApcCdh => pCdh + Apc; kPhCdhB*ApcCdh*Cb;  // modifiers: Cb
  DeEAC1: ACE => ApcCdh; kDeEmi1*ACE;
  DeEAC2: ACE => ApcCdh; kDeEmi2*ACE;
  PhApcCdhByCa: ApcCdh => pApcCdh; kPhApcA*ApcCdh*Ca;  // modifiers: Ca
  PhApcCdhByCb: ApcCdh => pApcCdh; kPhApcB*ApcCdh*Cb;  // modifiers: Cb
  DeEmi1: Emi => ; kDeEmi1*Emi;
end
