// SBML level 2 version 4

function Constant_flux__irreversible(v)
  v;
end
Constant_flux__irreversible is "Constant flux (irreversible)";

model RP_G1S_G2M_MA_v15_1()
  // RP-G1S-G2M-MA_v15_1

  // Compartments:
  compartment compartment = 1e-13;

  // Species:
  species $Cd in compartment = 1;
  species Ce in compartment = 0;
  species E2f in compartment = 0;
  species pE2f in compartment = 0;
  species Ca in compartment = 0;
  species Cb in compartment = 0;
  species E2fRb in compartment = 0;
  species pE2fRb in compartment = 0;
  species Rb in compartment = 1;
  species pRb in compartment = 0;
  species B55 in compartment = 0.25;
  species $tRb in compartment;
  species E2fPx in compartment = 0;
  species Px in compartment = 1;
  species Apc in compartment = 5;
  species Cdc20 in compartment = 0;
  species pApcCdc in compartment = 0;
  species pApc in compartment = 0;
  species ApcCdh in compartment = 0;
  species Cdh in compartment = 1;
  species pCdh in compartment = 0;
  species ACE in compartment = 0;
  species Emi in compartment = 0;
  species pACE in compartment = 0;
  species pApcCdh in compartment = 0;
  species pEmi in compartment = 0;
  species Fox in compartment = 0;
  species pFox in compartment = 0;
  species pFoxPcb in compartment = 0;
  species Procb in compartment = 1;
  species $tPcb in compartment;
  species Pcdc in compartment = 1;
  species pFoxPcdc in compartment = 0;
  species Wee in compartment = 1;
  species pCb in compartment = 0;
  species pWee in compartment = 0;
  species pCdc25 in compartment = 0;
  species Cdc25 in compartment = 1;
  species Gw in compartment = 1;
  species pGw in compartment = 0;
  species Ensa in compartment = 1;
  species pEnsa in compartment = 0;
  species pEB55 in compartment = 0;
  species $tApc in compartment;
  species $t_pApc in compartment; t_pApc is "t_pApc_";
  species $tCdh in compartment;
  species $tEnsa in compartment;
  species $tB55 in compartment;
  species $tGw in compartment;
  species $tCdc25 in compartment;
  species $tWee in compartment;
  species $tPx in compartment;
  species $tPcdc in compartment;
  species $tCb in compartment;
  species $tEmi in compartment;
  species $tCdc20 in compartment;

  // Parameters:
  kPhRbD = 0.005544006;
  kPhRbE = 0.00693000693;
  kDpRb = 0.001386001;
  kPhRb = 0.02079002;
  kSyCe1 = 1.386001e-5;
  kSyCe2 = 0.0004158004;
  kDeCe = 0.0001386001;
  kDiE2fRb = 0.0003465003;
  kAsE2fRb = 0.3465003;
  kSyE2f1 = 6.93000693e-6;
  kSyE2f2 = 6.93000693e-5;
  kDeE2f1 = 6.93000693e-5;
  kDeE2f2 = 0.001386001;
  kPhE2f = 0.001386001;
  kDpE2f1 = 0;
  kDpE2f2 = 0.0693000693;
  kSyEmi1 = 3.465003e-5;
  kSyEmi2 = 0.0003465003;
  kDeEmi1 = 0.0003465003;
  kDeEmi2 = 0.0003465003;
  kDeEmi3 = 0.003465003;
  kPhEmiA = 3.465003e-5;
  kPhEmiB = 0.0001732502;
  kDpEmi = 3.465003e-6;
  kSyCa1 = 6.93000693e-6;
  kSyCa2 = 5.197505e-5;
  kDeCa1 = 6.93000693e-6;
  kDeCa2 = 0.002772003;
  kDeCa3 = 0.000693000693;
  kDpCdh = 0.003465003;
  kPhCdhA = 0.01732502;
  kPhCdhE = 0.000693000693;
  kPhCdhB = 0.1732502;
  kDiACE = 0.0003465003;
  kAsACE = 0.3465003;
  kDiACdh = 0.0003465003;
  kAsACdh = 0.3465003;
  kPhCeA = 0.00693000693;
  kPhCeE = 6.93000693e-5;
  kPhFoxE = 0.000693000693;
  kPhFoxA = 0.000693000693;
  kPhFoxB = 0.003465003;
  kDpFox = 3.465003e-5;
  kSyCb1 = 6.93000693e-6;
  kSyCb2 = 5.197505e-5;
  kDeCb1 = 6.93000693e-6;
  kDeCb2 = 0.0008662509;
  kDeCb3 = 0.0008662509;
  kPhEnsa = 0.000693000693;
  kDpEnsa = 0.0003465003;
  kPhGw = 0.00693000693;
  kDpGw1 = 0.001732502;
  kDpGw2 = 0.0693000693;
  kWee1 = 6.93000693e-5;
  kWee2 = 0.00693000693;
  kPhWeeA = 0.000693000693;
  kPhWeeB = 0.00693000693;
  kDpWee = 0.0693000693;
  kCdc25_1 = 0.000693000693;
  kCdc25_2 = 0.00693000693;
  kPhC25A = 0;
  kDpCdc25 = 0.0693000693;
  kDipEB55 = 4.712405e-5;
  kAspEB55 = 0.3950104;
  kSyCdc_1 = 6.93000693e-6;
  kSyCdc_2 = 6.93000693e-5;
  kDeCdc_1 = 2.772003e-5;
  kDeCdc_2 = 0.0002772003;
  kDipACdc = 0.0008662509;
  kAspACdc = 0.00693000693;
  kPhApcA = 6.93000693e-5;
  kPhApcB = 6.93000693e-5;
  kDpApc = 0.03465003;
  kSyFox1 = 6.93000693e-6;
  kSyFox2 = 5.197505e-5;
  kDeFox1 = 6.93000693e-6;
  kDeFox2 = 0.003465003;
  kAsEPx = 0.3465003;
  kDiEPx = 0.03465003;
  kAsFPcb = 0.3465003;
  kDiFPcb = 0.0693000693;
  kAsFPcdc = 0.3465003;
  kDiFPcdc = 0.1732502;
  kPhC25B = 0.00693000693;
  kPhCdhEf4 = 0.00055440055;
  kPhCdhAf4 = 0.01386001;
  kPhCdhBf4 = 0.1386001;

  // Assignment rules:
  tB55 := B55 + pEB55;
  tEnsa := Ensa + pEB55 + pEnsa;
  tGw := Gw + pGw;
  tApc := ACE + Apc + ApcCdh + pACE + pApc + pApcCdc + pApcCdh;
  t_pApc := pACE + pApc + pApcCdc + pApcCdh;
  tCdh := ACE + ApcCdh + Cdh + pACE + pApcCdh + pCdh;
  tCdc25 := Cdc25 + pCdc25;
  tPcb := Procb + pFoxPcb;
  tWee := pWee + Wee;
  tPx := E2fPx + Px;
  tPcdc := Pcdc + pFoxPcdc;
  tCb := Cb + pCb;
  tEmi := ACE + Emi + pACE + pEmi;
  tCdc20 := Cdc20 + pApcCdc;
  tRb := Rb + pRb + pE2fRb + E2fRb;

  // Reactions:
  SyE2f1: => E2f; compartment*Constant_flux__irreversible(kSyE2f1);
  AspFoxPcb: pFox + Procb => pFox + pFoxPcb; compartment*kAsFPcb*pFox*Procb;
  SyE2f2: E2fPx => E2fPx + E2f; compartment*kSyE2f2*E2fPx;
  DeE2f: E2f => ; compartment*kDeE2f1*E2f;
  DiE2fPx: E2fPx => Px; compartment*kDiEPx*E2fPx;
  PhRbE2fByCd: E2fRb + $Cd => E2f + pRb + $Cd; compartment*kPhRbD*E2fRb*Cd;
  PhRbE2fByCe: E2fRb + Ce => E2f + pRb + Ce; compartment*kPhRbE*E2fRb*Ce;
  PhRbE2fByCa: E2fRb + Ca => E2f + pRb + Ca; compartment*kPhRb*E2fRb*Ca;
  PhRbE2fByCb: E2fRb + Cb => E2f + pRb + Cb; compartment*kPhRb*E2fRb*Cb;
  PhE2fByCa: E2f + Ca => pE2f + Ca; compartment*kPhE2f*E2f*Ca;
  PhE2fByCb: E2f + Cb => pE2f + Cb; compartment*kPhE2f*E2f*Cb;
  DppE2f1: pE2f => E2f; compartment*kDpE2f1*pE2f;
  DppE2fRb2: pE2fRb + B55 => E2fRb + B55; compartment*kDpE2f2*pE2fRb*B55;
  DepE2f1: pE2f => ; compartment*kDeE2f1*pE2f;
  DepE2f2: pE2f => ; compartment*kDeE2f2*pE2f;
  PhRbpE2fByCd: pE2fRb + $Cd => pE2f + pRb + $Cd; compartment*kPhRbD*pE2fRb*Cd;
  PhRbpE2fByCa: pE2fRb + Ca => pE2f + pRb + Ca; compartment*kPhRb*pE2fRb*Ca;
  PhRbpE2fByCb: pE2fRb + Cb => pE2f + pRb + Cb; compartment*kPhRb*pE2fRb*Cb;
  PhRbpE2fByCe: pE2fRb + Ce => pE2f + pRb + Ce; compartment*kPhRbE*pE2fRb*Ce;
  PhE2fRbByCa: E2fRb + Ca => pE2fRb + Ca; compartment*kPhE2f*E2fRb*Ca;
  PhE2fRbByCb: E2fRb + Cb => pE2fRb + Cb; compartment*kPhE2f*E2fRb*Cb;
  DppE2fRb1: pE2fRb => E2fRb; compartment*kDpE2f1*pE2fRb;
  DeE2fRb: E2fRb => Rb; compartment*kDeE2f1*E2fRb;
  DepE2fRb1: pE2fRb => Rb; compartment*kDeE2f1*pE2fRb;
  DepE2fRb2: pE2fRb => Rb; compartment*kDeE2f2*pE2fRb;
  PhRbByCd: Rb + $Cd => pRb + $Cd; compartment*kPhRbD*Rb*Cd;
  PhRbByCe: Rb + Ce => pRb + Ce; compartment*kPhRbE*Rb*Ce;
  PhRbByCa: Rb + Ca => pRb + Ca; compartment*kPhRb*Rb*Ca;
  PhRbByCb: Rb + Cb => pRb + Cb; compartment*kPhRb*Rb*Cb;
  SyCe1: => Ce; compartment*Constant_flux__irreversible(kSyCe1);
  SyCa2: E2fPx => E2fPx + Ca; compartment*kSyCa2*E2fPx;
  DeCe1: Ce => ; compartment*kDeCe*Ce;
  DeCe2: 2 Ce => Ce; compartment*kPhCeE*Ce^2;
  DpRb: pRb => Rb; compartment*kDpRb*pRb;
  DppApcCdc20: pApcCdc + B55 => Cdc20 + Apc + B55; compartment*kDpApc*pApcCdc*B55;
  PhApcByCa: Apc + Ca => Ca + pApc; compartment*kPhApcA*Apc*Ca;
  PhApcByCb: Apc + Cb => Cb + pApc; compartment*kPhApcB*Apc*Cb;
  DppApc: pApc + B55 => B55 + Apc; compartment*kDpApc*pApc*B55;
  PhCdhApcByCa: ApcCdh + Ca => pCdh + Apc + Ca; compartment*kPhCdhA*ApcCdh*Ca;
  PhCAEByCe: ACE + Ce => pCdh + Emi + Apc + Ce; compartment*kPhCdhEf4*ACE*Ce;
  PhCAEByCa: ACE + Ca => pCdh + Emi + Apc + Ca; compartment*kPhCdhAf4*ACE*Ca;
  PhCAEByCb: ACE + Cb => pCdh + Emi + Apc + Cb; compartment*kPhCdhBf4*ACE*Cb;
  PhCpAEByCe: pACE + Ce => Emi + pCdh + pApc + Ce; compartment*kPhCdhEf4*pACE*Ce;
  PhCpAEByCa: pACE + Ca => Emi + pCdh + pApc + Ca; compartment*kPhCdhAf4*pACE*Ca;
  PhCpAEByCb: pACE + Cb => Emi + pCdh + pApc + Cb; compartment*kPhCdhBf4*pACE*Cb;
  PhCdhpApcByCe: pApcCdh + Ce => pCdh + pApc + Ce; compartment*kPhCdhE*pApcCdh*Ce;
  DppApcCdh: pApcCdh + B55 => ApcCdh + B55; compartment*kDpApc*pApcCdh*B55;
  DeEpAC1: pACE => pApcCdh; compartment*kDeEmi1*pACE;
  DeEpAC2: pACE => pApcCdh; compartment*kDeEmi2*pACE;
  PhEpACByCa: pACE + Ca => pEmi + pApcCdh + Ca; compartment*kPhEmiA*pACE*Ca;
  PhEpACByCb: pACE + Cb => pEmi + pApcCdh + Cb; compartment*kPhEmiB*pACE*Cb;
  PhACEByCa: ACE + Ca => pACE + Ca; compartment*kPhApcA*ACE*Ca;
  PhACEByCb: ACE + Cb => pACE + Cb; compartment*kPhApcB*ACE*Cb;
  DppACE: pACE + B55 => ACE + B55; compartment*kDpApc*pACE*B55;
  PhEmiByCa: Emi + Ca => Ca + pEmi; compartment*kPhEmiA*Emi*Ca;
  PhEmiByCb: Emi + Cb => Cb + pEmi; compartment*kPhEmiB*Emi*Cb;
  DppEmi: pEmi => Emi; compartment*kDpEmi*pEmi;
  PhEACByCa: ACE + Ca => pEmi + ApcCdh + Ca; compartment*kPhEmiA*ACE*Ca;
  PhEACByCb: ACE + Cb => pEmi + ApcCdh + Cb; compartment*kPhEmiB*ACE*Cb;
  DepEmi1: pEmi => ; compartment*kDeEmi1*pEmi;
  DepEmi2: pEmi => ; compartment*kDeEmi3*pEmi;
  SyFox1: => Fox; compartment*Constant_flux__irreversible(kSyFox1);
  SyEmi2: E2fPx => E2fPx + Emi; compartment*kSyEmi2*E2fPx;
  PhCdhByCe: Cdh + Ce => Ce + pCdh; compartment*kPhCdhE*Cdh*Ce;
  PhCdhByCa: Cdh + Ca => Ca + pCdh; compartment*kPhCdhA*Cdh*Ca;
  PhCdhByCb: Cdh + Cb => Cb + pCdh; compartment*kPhCdhB*Cdh*Cb;
  DppCdh: pCdh => Cdh; compartment*kDpCdh*pCdh;
  SyCa1: => Ca; compartment*Constant_flux__irreversible(kSyCa1);
  DeCa1: Ca => ; compartment*kDeCa1*Ca;
  DeCe3: Ce + Ca => Ca; compartment*kPhCeA*Ce*Ca;
  DeCa2_1: Ca + ApcCdh => ApcCdh; compartment*kDeCa2*Ca*ApcCdh; DeCa2_1 is "DeCa2.1";
  DeCa2_2: Ca + pApcCdh => pApcCdh; compartment*kDeCa2*Ca*pApcCdh; DeCa2_2 is "DeCa2.2";
  DeCa3: Ca + pApcCdc => pApcCdc; compartment*kDeCa3*Ca*pApcCdc;
  SyFox2: E2fPx => E2fPx + Fox; compartment*kSyFox2*E2fPx;
  DeFox1: Fox => ; compartment*kDeFox1*Fox;
  DeFox2_1: Fox + ApcCdh => ApcCdh; compartment*kDeFox2*Fox*ApcCdh; DeFox2_1 is "DeFox2.1";
  DepFox2_2: pFox + pApcCdh => pApcCdh; compartment*kDeFox2*pFox*pApcCdh; DepFox2_2 is "DepFox2.2";
  DepFox1: pFox => ; compartment*kDeFox1*pFox;
  DepFox2_1: pFox + ApcCdh => ApcCdh; compartment*kDeFox2*pFox*ApcCdh; DepFox2_1 is "DepFox2.1";
  DeFox2_2: Fox + pApcCdh => pApcCdh; compartment*kDeFox2*Fox*pApcCdh; DeFox2_2 is "DeFox2.2";
  PhFoxByCe: Fox + Ce => Ce + pFox; compartment*kPhFoxE*Fox*Ce;
  PhFoxByCa: Fox + Ca => Ca + pFox; compartment*kPhFoxA*Fox*Ca;
  PhFoxByCb: Fox + Cb => Cb + pFox; compartment*kPhFoxB*Fox*Cb;
  DppFox: pFox => Fox; compartment*kDpFox*pFox;
  SyCb1: => Cb; compartment*Constant_flux__irreversible(kSyCb1);
  SyCb2: pFoxPcb => pFoxPcb + Cb; compartment*kSyCb2*pFoxPcb;
  AsE2fPx: E2f + Px => E2f + E2fPx; compartment*kAsEPx*E2f*Px;
  DipFoxPcb: pFoxPcb => Procb; compartment*kDiFPcb*pFoxPcb;
  DeCb1: Cb => ; compartment*kDeCb1*Cb;
  DeCb2_1: Cb + ApcCdh => ApcCdh; compartment*kDeCb2*Cb*ApcCdh; DeCb2_1 is "DeCb2.1";
  DeCb2_2: Cb + pApcCdh => pApcCdh; compartment*kDeCb2*Cb*pApcCdh; DeCb2_2 is "DeCb2.2";
  DeCb3: Cb + pApcCdc => pApcCdc; compartment*kDeCb3*Cb*pApcCdc;
  DeCdcpApc1: pApcCdc => pApc; compartment*kDeCdc_1*pApcCdc;
  DeCdcpApc2_1: pApcCdc + ApcCdh => pApc + ApcCdh; compartment*kDeCdc_2*pApcCdc*ApcCdh; DeCdcpApc2_1 is "DeCdcpApc2.1";
  DeCdcpApc2_2: pApcCdc + pApcCdh => pApc + pApcCdh; compartment*kDeCdc_2*pApcCdc*pApcCdh; DeCdcpApc2_2 is "DeCdcpApc2.2";
  SyCdc20_1: => Cdc20; compartment*Constant_flux__irreversible(kSyCdc_1);
  SyCdc20_2: pFoxPcdc => pFoxPcdc + Cdc20; compartment*kSyCdc_2*pFoxPcdc;
  AspFoxPcdc: pFox + Pcdc => pFoxPcdc + pFox; compartment*kAsFPcdc*pFox*Pcdc;
  DipFoxPcdc: pFoxPcdc => Pcdc; compartment*kDiFPcdc*pFoxPcdc;
  PhCbByWee: Cb + Wee => Wee + pCb; compartment*kWee2*Cb*Wee;
  PhCbBypWee: Cb + pWee => pWee + pCb; compartment*kWee1*Cb*pWee;
  DppCbBypCdc25: pCb + pCdc25 => pCdc25 + Cb; compartment*kCdc25_2*pCb*pCdc25;
  DppCbByCdc25: pCb + Cdc25 => Cdc25 + Cb; compartment*kCdc25_1*pCb*Cdc25;
  DepCb1: pCb => ; compartment*kDeCb1*pCb;
  DepCb2_1: pCb + ApcCdh => ApcCdh; compartment*kDeCb2*pCb*ApcCdh; DepCb2_1 is "DepCb2.1";
  DepCb2_2: pCb + pApcCdh => pApcCdh; compartment*kDeCb2*pCb*pApcCdh; DepCb2_2 is "DepCb2.2";
  DepCb3: pCb + pApcCdc => pApcCdc; compartment*kDeCb3*pCb*pApcCdc;
  PhCdc25ByCb: Cdc25 + Cb => Cb + pCdc25; compartment*kPhC25B*Cdc25*Cb;
  PhCdc25ByCa: Cdc25 + Ca => Ca + pCdc25; compartment*kPhC25A*Cdc25*Ca;
  DppCdc25: pCdc25 + B55 => B55 + Cdc25; compartment*kDpCdc25*pCdc25*B55;
  DppWee: pWee + B55 => B55 + Wee; compartment*kDpWee*pWee*B55;
  PhWeeByCa: Wee + Ca => Ca + pWee; compartment*kPhWeeA*Wee*Ca;
  PhWeeByCb: Wee + Cb => Cb + pWee; compartment*kPhWeeB*Wee*Cb;
  PhGw: Gw + Cb => pGw + Cb; compartment*kPhGw*Gw*Cb;
  DppGw1: pGw => Gw; compartment*kDpGw1*pGw;
  DppGw2: pGw + B55 => B55 + Gw; compartment*kDpGw2*pGw*B55;
  PhEnsa: Ensa + pGw => pGw + pEnsa; compartment*kPhEnsa*Ensa*pGw;
  DppEB55: pEB55 => B55 + Ensa; compartment*kDpEnsa*pEB55;
  SyEmi1: => Emi; compartment*Constant_flux__irreversible(kSyEmi1);
  SyCe2: E2fPx => E2fPx + Ce; compartment*kSyCe2*E2fPx;
  DeCdc20_1: Cdc20 => ; compartment*kDeCdc_1*Cdc20;
  DeCdc20_2_1: Cdc20 + ApcCdh => ApcCdh; compartment*kDeCdc_2*Cdc20*ApcCdh; DeCdc20_2_1 is "DeCdc20_2.1";
  DeCdc20_2_2: Cdc20 + pApcCdh => pApcCdh; compartment*kDeCdc_2*Cdc20*pApcCdh; DeCdc20_2_2 is "DeCdc20_2.2";
  DppE2f2: pE2f + B55 => E2f + B55; compartment*kDpE2f2*pE2f*B55;
  PhCdhpApcByCa: pApcCdh + Ca => pCdh + pApc + Ca; compartment*kPhCdhA*pApcCdh*Ca;
  PhCdhpApcByCb: pApcCdh + Cb => pCdh + pApc + Cb; compartment*kPhCdhB*pApcCdh*Cb;
  PhCdhApcByCe: ApcCdh + Ce => pCdh + Apc + Ce; compartment*kPhCdhE*ApcCdh*Ce;
  PhCdhApcByCb: ApcCdh + Cb => pCdh + Apc + Cb; compartment*kPhCdhB*ApcCdh*Cb;
  DeEAC1: ACE => ApcCdh; compartment*kDeEmi1*ACE;
  DeEAC2: ACE => ApcCdh; compartment*kDeEmi2*ACE;
  PhApcCdhByCa: ApcCdh + Ca => pApcCdh + Ca; compartment*kPhApcA*ApcCdh*Ca;
  PhApcCdhByCb: ApcCdh + Cb => pApcCdh + Cb; compartment*kPhApcB*ApcCdh*Cb;
  DeEmi1: Emi => ; compartment*kDeEmi1*Emi;
  AsE2fRb__forward: E2f + Rb => E2fRb; compartment*kAsE2fRb*E2f*Rb; AsE2fRb__forward is "AsE2fRb (forward)";
  AsE2fRb__backward: E2fRb => E2f + Rb; compartment*kDiE2fRb*E2fRb; AsE2fRb__backward is "AsE2fRb (backward)";
  AspE2fRb__forward: pE2f + Rb => pE2fRb; compartment*kAsE2fRb*pE2f*Rb; AspE2fRb__forward is "AspE2fRb (forward)";
  AspE2fRb__backward: pE2fRb => pE2f + Rb; compartment*kDiE2fRb*pE2fRb; AspE2fRb__backward is "AspE2fRb (backward)";
  AsApcCdh__forward: Cdh + Apc => ApcCdh; compartment*kAsACdh*Cdh*Apc; AsApcCdh__forward is "AsApcCdh (forward)";
  AsApcCdh__backward: ApcCdh => Cdh + Apc; compartment*kDiACdh*ApcCdh; AsApcCdh__backward is "AsApcCdh (backward)";
  AspApcCdh__forward: pApc + Cdh => pApcCdh; compartment*kAsACdh*pApc*Cdh; AspApcCdh__forward is "AspApcCdh (forward)";
  AspApcCdh__backward: pApcCdh => pApc + Cdh; compartment*kDiACdh*pApcCdh; AspApcCdh__backward is "AspApcCdh (backward)";
  AspACE__forward: Emi + pApcCdh => pACE; compartment*kAsACE*Emi*pApcCdh; AspACE__forward is "AspACE (forward)";
  AspACE__backward: pACE => Emi + pApcCdh; compartment*kDiACE*pACE; AspACE__backward is "AspACE (backward)";
  AsACE__forward: ApcCdh + Emi => ACE; compartment*kAsACE*ApcCdh*Emi; AsACE__forward is "AsACE (forward)";
  AsACE__backward: ACE => ApcCdh + Emi; compartment*kDiACE*ACE; AsACE__backward is "AsACE (backward)";
  AspApcCdc20__forward: pApc + Cdc20 => pApcCdc; compartment*kAspACdc*pApc*Cdc20; AspApcCdc20__forward is "AspApcCdc20 (forward)";
  AspApcCdc20__backward: pApcCdc => pApc + Cdc20; compartment*kDipACdc*pApcCdc; AspApcCdc20__backward is "AspApcCdc20 (backward)";
  AspEB55__forward: pEnsa + B55 => pEB55; compartment*kAspEB55*pEnsa*B55; AspEB55__forward is "AspEB55 (forward)";
  AspEB55__backward: pEB55 => pEnsa + B55; compartment*kDipEB55*pEB55; AspEB55__backward is "AspEB55 (backward)";

  // Unit definitions:
  unit substance = 1e-9 mole;
end
